2^-23*2 - 1 float → -0.999999761581
2^-23*2 - ((2^24 - 1)*2^-23 - 2^-23) float, 200 → -1.999999523162841796875
2^-23*2 - x == -(1.5 + 2^-23) solve, x, float, 200 → 1.50000035762786865234375
B := 1.5 + (2^-23 + 2^-22) float, 200 → 1.50000035762786865234375
A - B == 2^-23 solve, A, float, 200 → 1.500000476837158203125
A := 1.5 + 2^-21 float, 200 → 1.500000476837158203125
A - B == 2^-23 → 1
B_min := 1
2*2^-23 - B → -1.50000011921
B_max := (2^24 - 1)*2^-23 - 2^-23 float, 200 → 1.9999997615814208984375
A_min := 2^-23 float, 200 → 0.11920928955078125*10^-6
A_max := (2^24 - 1)*2^-23 float, 200 → 1.99999988079071044921875
x - B == -1.99951171875 solve, x, float, 200 → -0.49951136112213134765625
B := 2^-16*2 - x == -1.75 solve, x, float, 200 → 1.750030517578125
r - 1.750030517578125 == 2^-16 solve, r, float, 200 → 1.7500457763671875
A := 1.75004577637
B := 1.75003051758
A - B float, 200 → 0.0000152587890625
0.0000152587890625*2 - B float, 200 → -1.75
-1.50000011921*2 + B → -1.24996972084
(2^24 - 1)*(2^-23) float, 200 → 1.99999988079071044921875
x_1 - (2^22 - 1)*2^-21 == -1.99999988079071044921875 solve, x_1, float, 200 → -(0.35762786865234375*10^-6)
