min_norm := 1
min_denorm := 2^-23 float, 200 → 0.11920928955078125*10^-6
bad_min := -2
max_norm := (2^24 - 1)*2^-23 float, 200 → 1.99999988079071044921875
bad_max := -(1.5 + 2^-23) float, 200 → -1.50000011920928955078125
min_norm - max_norm float, 200 → -0.99999988079071044921875
B_max := (2^24 - 1)*2^-23 - 2^-23 float, 200 → 1.9999997615814208984375
min_denorm*2 - (1 + 2^-7) float, 200 → -1.0078122615814208984375
# Нежелательное значение -2 невозможно получить ни на каком шаге.
0 - B == 2 solve, B → -2
min_denorm*2 - (1.5 + (2^18 - 1)*2^-23) float, 200 → -1.53124964237213134765625
min_denorm*2 - ((2^15 - 1)*2^-14 + 2^-23) float, 200 → -1.99993884563446044921875
# Наименьшее нежелательное
(min_denorm*2 - (2^-15 + 2^-22)) - ((2^15 - 1)*2^-14 + 2^-23) float, 200 → -1.99996960163116455078125
min_denorm*2 - B_max float, 200 → -1.999999523162841796875
min_denorm*2 - (2^-15 + 2^-22) float, 200 → -0.000030517578125
# Один способ получить наибольшее нежелательное через наименьший положительный остаток
(min_denorm*2 - (2^-16 + 2^-22)) - ((2^16 - 1)*2^-15 + 2^-23) float, 200 → -1.99998486042022705078125
min_denorm*2 - B_x == bad_max solve, B_x, float, 200 → 1.50000035762786865234375
min_denorm*2 - (2^-16 + 2^-22) → -0.0000152587890625
A_x - 1.50000035762786865234375 == min_denorm solve, A_x, float, 200 → 1.500000476837158203125
